// SBML level 3 version 2
// Created with https://github.com/matthiaskoenig/sbmlutils.

model pancreas_deepa_v23()
  // pancreas glucose model
  // The pancreas plays a critical role in maintaining glucose homeostasis through the secretion of hormones from the islets of Langerhans. Glucose-stimulated insulin secretion (GSIS) by the pancreatic beta-cell is the main mechanism for reducing elevated plasma glucose. Here we present a systematic modeling workflow for the development of kinetic pathway models using the Systems Biology Markup Language (SBML). An important factor was the reproducibility and exchangeability of the model, which allowed the use of various existing tools. The workflow was applied to construct a novel data-driven kinetic model of GSIS in the pancreatic beta-cell based on experimental and clinical data from 39 studies spanning 50 years of pancreatic, islet, and beta-cell research in humans, rats, mice, and cell lines. The model consists of detailed glycolysis and phenomenological equations for insulin secretion coupled to cellular energy state, ATP dynamics and (ATP/ADP ratio). Key findings of our work are that in GSIS there is a glucose-dependent increase in almost all intermediates of glycolysis. This increase in glycolytic metabolites is accompanied by an increase in energy metabolites, especially ATP and NADH. One of the few decreasing metabolites is ADP, which, in combination with the increase in ATP, results in a large increase in ATP/ADP ratios in the beta-cell with increasing glucose. Insulin secretion is dependent on ATP/ADP, resulting in glucose-stimulated insulin secretion.
  // isVersionOf taxonomy:9606 taxonomy:10090 taxonomy:10116 FMA:7198 ncit:C12393
  // hasProperty mamo:MAMO_0000045
  // isDescribedBy doi:10.3389/fendo.2023.1185656
  // model units - substance: pmole, time: min, volume: nl, area: m2, length: m, extent: pmole

  // Compartments:
  compartment cell = 0.001321 nl;  // SBO:0000290 ncit:C12508 FMA:68646; isVersionOf FMA:70586 BTO:0000783
  compartment ext; ext has nl; ext is "external compartment (blood)";  // SBO:0000290 ncit:C12434 FMA:9670
  compartment cyto; cyto has nl; cyto is "cytosol";  // SBO:0000290 ncit:C61554 FMA:66836
  compartment mito; mito has nl; mito is "mitochondrial compartment";  // SBO:0000290 ncit:C13258 FMA:63835
  compartment mm = NaN; mm has m2; mm is "mitochondrial membrane";  // 2-D; SBO:0000290 ncit:C25937 FMA:66861
  compartment pm = NaN; pm has m2; pm is "plasma membrane";  // 2-D; SBO:0000290 ncit:C13735 FMA:63841

  // Species:
  // Initial concentration set to 60 pM (in line with insulin secretion).
  species $ins_ext in ext = 6e-8; ins_ext is "insulin";  // SBO:0000245 uniprot:P01308 CHEBI:145810 ncit:C2271
  species $cpep_ext in ext = 0; cpep_ext is "C-peptide";  // SBO:0000245 CHEBI:80332 ncit:C94608
  species $glc_ext in ext = 2.8; glc_ext is "glucose (blood)";  // SBO:0000247 inchikey:WQZGKKKJIJFFOK-GASJEMHNSA-N vmhmetabolite:glc_D bigg.metabolite:glc__D
  species $lac_ext in ext = 1; lac_ext is "lactate (blood)";  // SBO:0000247 inchikey:JVTAAEKCZFNVCJ-REOHCLBHSA-M vmhmetabolite:lac_L bigg.metabolite:lac__L
  species adp in cyto = 1.199; adp is "ADP";  // SBO:0000247 inchikey:XTWYTFMLZFPYCI-KQYNXXCUSA-N vmhmetabolite:adp bigg.metabolite:adp
  species atp in cyto = 3.921; atp is "ATP";  // SBO:0000247 inchikey:ZKHQWZAMYRWXGA-KQYNXXCUSA-J vmhmetabolite:atp bigg.metabolite:atp
  species $nad in cyto; nad is "NAD";  // SBO:0000247 inchikey:BAWFJGJZGIEFAR-NNYOXOHSSA-N vmhmetabolite:nad bigg.metabolite:nad
  species $nadh in cyto; nadh is "NADH";  // SBO:0000247 inchikey:BOPGDPNILDQYTO-NNYOXOHSSA-L vmhmetabolite:nadh bigg.metabolite:nadh
  species $phos in cyto; phos is "phosphate";  // SBO:0000247 inchikey:NBIIXXVUZAFLBC-UHFFFAOYSA-K vmhmetabolite:pi bigg.metabolite:pi
  species $h in cyto = 1; h is "hydrogen ion";  // SBO:0000247 inchikey:GPRLSGONYQIRFK-UHFFFAOYSA-N vmhmetabolite:h bigg.metabolite:h
  species $h2o in cyto = 1;  // SBO:0000247 inchikey:XLYOFNOQVPJJNP-UHFFFAOYSA-M vmhmetabolite:h2o bigg.metabolite:h2o
  species bpg13 in cyto = 0.018; bpg13 is "1,3-biphosphoglycerate";  // SBO:0000247 inchikey:LJQLQCAXBUHEAZ-UWTATZPHSA-N vmhmetabolite:13dpg bigg.metabolite:13dpg
  species dhap in cyto = 0.011; dhap is "dihydroxyacetone phosphate";  // SBO:0000247 inchikey:GNGACRATGGDKBX-UHFFFAOYSA-N vmhmetabolite:dhap bigg.metabolite:dhap
  species f26bp in cyto = 0.002; f26bp is "fructose 2,6-bisphosphate";  // SBO:0000247 inchikey:YXWOAJXNVLXPMU-ZXXMMSQZSA-N vmhmetabolite:f26bp bigg.metabolite:f26bp
  species f6p in cyto = 0.008; f6p is "fructose 6-phosphate";  // SBO:0000247 inchikey:BGWGXPAPYGQALX-ARQDHWQXSA-N vmhmetabolite:f6p bigg.metabolite:f6p
  species fbp in cyto = 0.019; fbp is "fructose 1,6-bisphosphate";  // SBO:0000247 inchikey:RNBGYGVWRKECFJ-VRPWFDPXSA-N vmhmetabolite:fdp bigg.metabolite:fdp
  species g6p in cyto = 0.113; g6p is "glucose 6-phosphate";  // SBO:0000247 inchikey:YXWOAJXNVLXPMU-ZXXMMSQZSA-N vmhmetabolite:g6p bigg.metabolite:g6p
  species glc in cyto = 2.571; glc is "glucose";  // SBO:0000247 inchikey:NBSCHQHZLSJFNQ-GASJEMHNSA-N vmhmetabolite:glc_D bigg.metabolite:glc__D
  species grap in cyto = 0.003; grap is "glyceraldehyde 3-phosphate";  // SBO:0000247 inchikey:LXJXRIRHZLFYRP-UHFFFAOYSA-N vmhmetabolite:g3p bigg.metabolite:g3p
  species pep in cyto = 0.477; pep is "phosphoenolpyruvate";  // SBO:0000247 inchikey:DTBNBXWJWCWCIK-UHFFFAOYSA-M vmhmetabolite:pep bigg.metabolite:pep
  species pg2 in cyto = 0.14; pg2 is "2-phosphoglycerate";  // SBO:0000247 inchikey:GXIURPTVHJPJLF-UWTATZPHSA-K vmhmetabolite:2pg bigg.metabolite:2pg
  species pg3 in cyto = 0.669; pg3 is "3-phosphoglycerate";  // SBO:0000247 inchikey:OSJPPGNTCRNQQC-UWTATZPHSA-N vmhmetabolite:3pg bigg.metabolite:3pg
  species pyr in cyto = 0.392; pyr is "pyruvate";  // SBO:0000247 inchikey:LCTONWCANYUPML-UHFFFAOYSA-M vmhmetabolite:pyr bigg.metabolite:pyr
  species lac in cyto = 1.083; lac is "lactate";  // SBO:0000247 inchikey:JVTAAEKCZFNVCJ-REOHCLBHSA-M vmhmetabolite:lac_L bigg.metabolite:lac__L
  species $pyr_mito in mito = 1; pyr_mito is "pyruvate (mito)";  // SBO:0000247 inchikey:LCTONWCANYUPML-UHFFFAOYSA-M vmhmetabolite:pyr bigg.metabolite:pyr

  // Parameters:
  f_scale = 1 dimless; f_scale is "Vmax scaling factor";  // SBO:0000002
  IRSss_Vm = 0.02 mmole_per_min_l; IRSss_Vm is "Vmax IRS steady state";  // SBO:0000186
  IRSss_Katp_ratio = 5.133477 dimless; IRSss_Katp_ratio is "Km IRS steady state for atp_ratio";  // SBO:0000027
  IRSss_hillatp_ratio = 7.105276 dimless; IRSss_hillatp_ratio is "Hill coefficient IRS steady state";  // SBO:0000190
  IRSfp_Vm = 0.05 mmole_per_min_l; IRSfp_Vm is "Vmax IRS first phase";  // SBO:0000009
  IRSfp_Kdatp_dt = 0.0003 pmole_per_min; IRSfp_Kdatp_dt is "Km IRS first phase for datp/dt";  // SBO:0000027
  NUCLEOTIDE_CHANGE_Vm = 0.2 per_min; NUCLEOTIDE_CHANGE_Vm is "Vmax nucleotide change";  // SBO:0000186
  presim_duration = 60 min; presim_duration is "presimulation duration";
  presim_glc_ext = 3 mM; presim_glc_ext is "presimulation glucose concentration";
  sim_glc_ext = 3 mM; sim_glc_ext is "simulation glucose concentration";
  ATPformation_KMadp = 5.6 mM; ATPformation_KMadp is "Km ATPformation for adp";  // SBO:0000027
  ATPformation_KMphos = 3.4 mM; ATPformation_KMphos is "Km ATPformation for phos";  // SBO:0000027
  ATPformation_Vm = 42.6819 mmole_per_min_l; ATPformation_Vm is "Vmax ATPformation";  // SBO:0000186
  ATPconsumption_KMatp = 2 mM; ATPconsumption_KMatp is "Km ATPconsumption for atp";  // SBO:0000027
  ATPconsumption_Vm = 5.58245 mmole_per_min_l; ATPconsumption_Vm is "Vmax ATPconsumption";  // SBO:0000186
  GLCt1r_KMglc_ext = 17 mM; GLCt1r_KMglc_ext is "Km GLCt1r for glc_ext";  // SBO:0000027
  GLCt1r_Vm = 1000 mmole_per_min_l; GLCt1r_Vm is "Vmax GLCt1r";  // SBO:0000186
  GLCt1r_KMglc = 17 mM; GLCt1r_KMglc is "Km GLCt1r for glc";  // SBO:0000027
  GLCt1r_Keq = 1 dimless; GLCt1r_Keq is "Keq GLCt1r";  // SBO:0000281
  HEX1_KMglc = 5 mM; HEX1_KMglc is "Km HEX1 for glc";  // SBO:0000027
  HEX1_KMatp = 0.63 mM; HEX1_KMatp is "Km HEX1 for atp";  // SBO:0000027
  HEX1_Vm = 2.71005 mmole_per_min_l; HEX1_Vm is "Vmax HEX1";  // SBO:0000186
  HEX1_KMg6p = 19.9 mM; HEX1_KMg6p is "Km HEX1 for g6p";  // SBO:0000027
  HEX1_KMadp = 0.63 mM; HEX1_KMadp is "Km HEX1 for adp";  // SBO:0000027
  HEX1_Keq = 2255.527 dimless; HEX1_Keq is "Keq HEX1";  // SBO:0000281
  PGI_KMg6p = 0.35 mM; PGI_KMg6p is "Km PGI for g6p";  // SBO:0000027
  PGI_Vm = 4525.64 mmole_per_min_l; PGI_Vm is "Vmax PGI";  // SBO:0000186
  PGI_KMf6p = 0.12 mM; PGI_KMf6p is "Km PGI for f6p";  // SBO:0000027
  PGI_Keq = 0.3646592 dimless; PGI_Keq is "Keq PGI";  // SBO:0000281
  PFK_KMf6p = 0.35 mM; PFK_KMf6p is "Km PFK for f6p";  // SBO:0000027
  PFK_KMatp = 0.063 mM; PFK_KMatp is "Km PFK for atp";  // SBO:0000027
  PFK_Vm = 7.48024 mmole_per_min_l; PFK_Vm is "Vmax PFK";  // SBO:0000186
  FBP_KMfbp = 0.1 mM; FBP_KMfbp is "Km FBP for fbp";  // SBO:0000027
  FBP_Vm = 0.01 mmole_per_min_l; FBP_Vm is "Vmax FBP";  // SBO:0000186
  FBA_KMfbp = 0.027 mM; FBA_KMfbp is "Km FBA for fbp";  // SBO:0000027
  FBA_Vm = 500.562 mmole_per_min_l; FBA_Vm is "Vmax FBA";  // SBO:0000186
  FBA_KMdhap = 0.38 mM; FBA_KMdhap is "Km FBA for dhap";  // SBO:0000027
  FBA_KMgrap = 0.32 mM; FBA_KMgrap is "Km FBA for grap";  // SBO:0000027
  FBA_Keq = 0.000133164 mM; FBA_Keq is "Keq FBA";  // SBO:0000281
  TPI_KMdhap = 0.62 mM; TPI_KMdhap is "Km TPI for dhap";  // SBO:0000027
  TPI_Vm = 4572.25 mmole_per_min_l; TPI_Vm is "Vmax TPI";  // SBO:0000186
  TPI_KMgrap = 0.55 mM; TPI_KMgrap is "Km TPI for grap";  // SBO:0000027
  TPI_Keq = 0.1138603 dimless; TPI_Keq is "Keq TPI";  // SBO:0000281
  GAPD_KMgrap = 0.07 mM; GAPD_KMgrap is "Km GAPD for grap";  // SBO:0000027
  GAPD_KMphos = 3.4 mM; GAPD_KMphos is "Km GAPD for phos";  // SBO:0000027
  GAPD_KMnad = 0.75 mM; GAPD_KMnad is "Km GAPD for nad";  // SBO:0000027
  GAPD_Vm = 4950.28 mmole_per_min_l; GAPD_Vm is "Vmax GAPD";  // SBO:0000186
  GAPD_KMbpg13 = 0.018 mM; GAPD_KMbpg13 is "Km GAPD for bpg13";  // SBO:0000027
  GAPD_KMnadh = 0.012 mM; GAPD_KMnadh is "Km GAPD for nadh";  // SBO:0000027
  GAPD_Keq = 0.4973832 per_mM; GAPD_Keq is "Keq GAPD";  // SBO:0000281
  PGK_KMadp = 0.126 mM; PGK_KMadp is "Km PGK for adp";  // SBO:0000027
  PGK_KMbpg13 = 0.042 mM; PGK_KMbpg13 is "Km PGK for bpg13";  // SBO:0000027
  PGK_Vm = 4912.9 mmole_per_min_l; PGK_Vm is "Vmax PGK";  // SBO:0000186
  PGK_KMatp = 0.24 mM; PGK_KMatp is "Km PGK for atp";  // SBO:0000027
  PGK_KMpg3 = 0.27 mM; PGK_KMpg3 is "Km PGK for pg3";  // SBO:0000027
  PGK_Keq = 1931.283 dimless; PGK_Keq is "Keq PGK";  // SBO:0000281
  PGM_KMpg3 = 0.22 mM; PGM_KMpg3 is "Km PGM for pg3";  // SBO:0000027
  PGM_Vm = 5000 mmole_per_min_l; PGM_Vm is "Vmax PGM";  // SBO:0000186
  PGM_KMpg2 = 0.139 mM; PGM_KMpg2 is "Km PGM for pg2";  // SBO:0000027
  PGM_Keq = 0.1744728 dimless; PGM_Keq is "Keq PGM";  // SBO:0000281
  ENO_KMpg2 = 0.3 mM; ENO_KMpg2 is "Km ENO for pg2";  // SBO:0000027
  ENO_Vm = 191.263 mmole_per_min_l; ENO_Vm is "Vmax ENO";  // SBO:0000186
  ENO_KMpep = 0.089 mM; ENO_KMpep is "Km ENO for pep";  // SBO:0000027
  ENO_Keq = 4.385345 dimless; ENO_Keq is "Keq ENO";  // SBO:0000281
  PYK_KMpep = 0.18 mM; PYK_KMpep is "Km PYK for pep";  // SBO:0000027
  PYK_KMadp = 0.22 mM; PYK_KMadp is "Km PYK for adp";  // SBO:0000027
  PYK_Vm = 7.44078 mmole_per_min_l; PYK_Vm is "Vmax PYK";  // SBO:0000186
  PYK_KMpyr = 3 mM; PYK_KMpyr is "Km PYK for pyr";  // SBO:0000027
  PYK_KMatp = 0.86 mM; PYK_KMatp is "Km PYK for atp";  // SBO:0000027
  PYK_Keq = 20593.31 dimless; PYK_Keq is "Keq PYK";  // SBO:0000281
  PYRt2r_KMpyr = 0.15 mM; PYRt2r_KMpyr is "Km PYRt2r for pyr";  // SBO:0000027
  PYRt2r_Vm = 0.0575902 mmole_per_min_l; PYRt2r_Vm is "Vmax PYRt2r";  // SBO:0000186
  LDH_L_KMpyr = 0.398 mM; LDH_L_KMpyr is "Km LDH_L for pyr";  // SBO:0000027
  LDH_L_KMnadh = 0.0107 mM; LDH_L_KMnadh is "Km LDH_L for nadh";  // SBO:0000027
  LDH_L_Vm = 7.26844 mmole_per_min_l; LDH_L_Vm is "Vmax LDH_L";  // SBO:0000186
  LDH_L_KMlac = 3 mM; LDH_L_KMlac is "Km LDH_L for lac";  // SBO:0000027
  LDH_L_KMnad = 0.211 mM; LDH_L_KMnad is "Km LDH_L for nad";  // SBO:0000027
  LDH_L_Keq = 100 dimless; LDH_L_Keq is "Keq LDH_L";  // SBO:0000281
  L_LACt2r_KMlac = 0.8 mM; L_LACt2r_KMlac is "Km L_LACt2r for lac";  // SBO:0000027
  L_LACt2r_Vm = 5.21331 mmole_per_min_l; L_LACt2r_Vm is "Vmax L_LACt2r";  // SBO:0000186
  PFK26_KMatp = 0.328 mM; PFK26_KMatp is "Km PFK26 for atp";  // SBO:0000027
  PFK26_KMf6p = 0.017 mM; PFK26_KMf6p is "Km PFK26 for f6p";  // SBO:0000027
  PFK26_Vm = 4.19328 mmole_per_min_l; PFK26_Vm is "Vmax PFK26";  // SBO:0000186
  FBP26_KMf26bp = 0.013 mM; FBP26_KMf26bp is "Km FBP26 for f26bp";  // SBO:0000027
  FBP26_Vm = 8.05946 mmole_per_min_l; FBP26_Vm is "Vmax FBP26";  // SBO:0000186
  atp_adp has mM; atp_adp is "ATP total";
  atp_ratio has dimless; atp_ratio is "ATP ratio";
  nadh_nad has mM; nadh_nad is "NADH total";
  nadh_ratio has dimless; nadh_ratio is "NADH ratio";
  fbp_grap has mM; fbp_grap is "FBP GRAP total";
  fbp_dhap_grap has mM; fbp_dhap_grap is "FBP DHAP GRAP total";
  fbp_dhap has mM; fbp_dhap is "FBP DHAP total";
  lac_pyr_ratio has dimless; lac_pyr_ratio is "LAC PYR ratio";
  IRS_ss has mmole_per_min_l; IRS_ss is "IRS steady state";
  datp_dt has pmole_per_min; datp_dt is "dATP/dt";
  IRS_fp has mmole_per_min_l; IRS_fp is "IRS first phase";
  IRS_per_vol has mmole_per_min_l; IRS_per_vol is "Insulin secretion (IRS) per volume pancreas";
  atp_adp_ss has mM; atp_adp_ss is "ATP+ADP steady state";

  // Assignment rules:
  ext := 1000 dimless*cell;
  cyto := 0.95 dimless*cell;
  mito := 0.05 dimless*cell;
  atp_adp := atp + adp;
  atp_ratio := atp/(adp + 1e-8 mM);
  nadh_nad := nadh + nad;
  nadh_ratio := nadh/(nad + 1e-8 mM);
  fbp_grap := fbp + grap;
  fbp_dhap_grap := fbp + dhap + grap;
  fbp_dhap := fbp + dhap;
  lac_pyr_ratio := lac/pyr;
  phos := piecewise(10.17465 mM, glc_ext < 2.4 mM, 10.17465 mM + (-0.1848226*(glc_ext - (2.4 mM))), (glc_ext >= 2.4 mM) && (glc_ext < 4 mM), 9.87893 mM + (-0.1848226*(glc_ext - (4 mM))), (glc_ext >= 4 mM) && (glc_ext < 8.6 mM), 9.028747 mM + (-0.1848226*(glc_ext - (8.6 mM))), (glc_ext >= 8.6 mM) && (glc_ext < 14.5 mM), 7.938293 mM + (-0.1848226*(glc_ext - (14.5 mM))), (glc_ext >= 14.5 mM) && (glc_ext < 16 mM), 7.661059 mM, glc_ext >= 16 mM, 0 mM);
  nad := 0.3 mM*(glc_ext^1.39/(glc_ext^1.39 + (5.32 mM)^1.39)) + 0.59 mM;
  nadh := 0.23 mM*(glc_ext^1.53/(glc_ext^1.53 + (9.13 mM)^1.53)) + 0.13 mM;
  // Steady state insulin secretion (IRS) depending on ATP/ADP ratio. Uses a Hill function.
  IRS_ss := IRSss_Vm*((atp/adp)^IRSss_hillatp_ratio/((atp/adp)^IRSss_hillatp_ratio + IRSss_Katp_ratio^IRSss_hillatp_ratio));
  // rateOf(ATP) rate of change
  datp_dt := ATPformation - ATPconsumption + PGK + PYK - PFK26 - HEX1 - PFK + ATP_ADP_CHANGE;
  // First phase insulin secretion (IRS) depending on the change in ATP: dATP/dt. The rise in ATP concentration triggers closure of APT-sensitive potassium (KATP) channels, which ultimately result in the release of insulin in the bloodstream.
  IRS_fp := piecewise(IRSfp_Vm*datp_dt/(datp_dt + IRSfp_Kdatp_dt), datp_dt > 0 pmole_per_min, 0 mmole_per_min_l);
  IRS_per_vol := IRS/cell;
  atp_adp_ss := 1.87 mM*(glc_ext^2.03/(glc_ext^2.03 + (4.01 mM)^2.03)) + 4.66 mM;

  // Reactions:
  ATPformation: adp + $phos + $h => atp + $h2o; cyto*ATPformation_Vm*(adp*phos/(ATPformation_KMadp*ATPformation_KMphos)/((1 + adp/ATPformation_KMadp)*(1 + phos/ATPformation_KMphos))); ATPformation is "ATP formation";  // SBO:0000176
  ATPconsumption: atp + $h2o => adp + $phos + $h; cyto*ATPconsumption_Vm*(atp/ATPconsumption_KMatp/(1 + atp/ATPconsumption_KMatp)); ATPconsumption is "ATP consumption";  // SBO:0000176
  GLCt1r: $glc_ext -> glc; cyto*GLCt1r_Vm*1/GLCt1r_KMglc_ext*((glc_ext - glc/GLCt1r_Keq)/(1 + glc_ext/GLCt1r_KMglc_ext + 1 + glc/GLCt1r_KMglc - 1)); GLCt1r is "Glucose Import (GLUT)";  // SBO:0000655 vmhreaction:GLCt1r bigg.reaction:GLCt1 META:TRANS-RXN0-574
  HEX1: glc + atp -> g6p + adp + $h; cyto*HEX1_Vm*1/(HEX1_KMglc*HEX1_KMatp)*((glc*atp - g6p*adp/HEX1_Keq)/((1 + glc/HEX1_KMglc)*(1 + atp/HEX1_KMatp) + (1 + g6p/HEX1_KMg6p)*(1 + adp/HEX1_KMadp) - 1)); HEX1 is "Hexokinase (D-Glucose:ATP) (HEX1)";  // SBO:0000176 vmhreaction:HEX1 rhea:17825 rhea:17828; isVersionOf uniprot:P35557
  PGI: g6p -> f6p; cyto*PGI_Vm*1/PGI_KMg6p*((g6p - f6p/PGI_Keq)/(1 + g6p/PGI_KMg6p + 1 + f6p/PGI_KMf6p - 1)); PGI is "Glucose-6-Phosphate Isomerase (PGI)";  // SBO:0000176 vmhreaction:PGI metanetx.reaction:MNXR102535 seed:rxn00558; isVersionOf uniprot:P06744
  PFK: f6p + atp => adp + fbp + $h; cyto*PFK_Vm*(f6p*atp/(PFK_KMf6p*PFK_KMatp)/((1 + f6p/PFK_KMf6p)*(1 + atp/PFK_KMatp))); PFK is "Phosphofructokinase (PFK)";  // SBO:0000176 vmhreaction:PFK metanetx.reaction:MNXR102507 seed:rxn00545; isVersionOf uniprot:P17858 uniprot:P08237 uniprot:Q01813
  FBP: fbp + $h2o => f6p + $phos; cyto*FBP_Vm*(fbp/FBP_KMfbp/(1 + fbp/FBP_KMfbp)); FBP is "Fructose-Bisphosphatase (FBP)";  // SBO:0000176 vmhreaction:FBP metanetx.reaction:MNXR99465 seed:rxn00549; isVersionOf uniprot:P09467 uniprot:Q9UMQ9 uniprot:O00757 uniprot:Q9UJ73
  FBA: fbp -> dhap + grap; cyto*FBA_Vm*1/FBA_KMfbp*((fbp - dhap*grap/FBA_Keq)/(1 + fbp/FBA_KMfbp + (1 + dhap/FBA_KMdhap)*(1 + grap/FBA_KMgrap) - 1)); FBA is "Fructose-Bisphosphate Aldolase (FBA)";  // SBO:0000176 vmhreaction:FBA rhea:14729 rhea:14732; isVersionOf uniprot:P09972 uniprot:P04075 uniprot:P05062
  TPI: dhap -> grap; cyto*TPI_Vm*1/TPI_KMdhap*((dhap - grap/TPI_Keq)/(1 + dhap/TPI_KMdhap + 1 + grap/TPI_KMgrap - 1)); TPI is "Triose-Phosphate Isomerase (TPI)";  // SBO:0000176 vmhreaction:TPI metanetx.reaction:MNXR104918 seed:rxn00747; isVersionOf uniprot:P60174
  GAPD: grap + $phos + $nad -> bpg13 + $nadh + $h; cyto*GAPD_Vm*1/(GAPD_KMgrap*GAPD_KMphos*GAPD_KMnad)*((grap*phos*nad - bpg13*nadh/GAPD_Keq)/((1 + grap/GAPD_KMgrap)*(1 + phos/GAPD_KMphos)*(1 + nad/GAPD_KMnad) + (1 + bpg13/GAPD_KMbpg13)*(1 + nadh/GAPD_KMnadh) - 1)); GAPD is "Glyceraldehyde-3-Phosphate Dehydrogenase (GAPD)";  // SBO:0000176 vmhreaction:GAPD rhea:10303 rhea:10300; isVersionOf uniprot:P04406 uniprot:O14556
  PGK: adp + bpg13 -> atp + pg3; cyto*PGK_Vm*1/(PGK_KMadp*PGK_KMbpg13)*((adp*bpg13 - atp*pg3/PGK_Keq)/((1 + adp/PGK_KMadp)*(1 + bpg13/PGK_KMbpg13) + (1 + atp/PGK_KMatp)*(1 + pg3/PGK_KMpg3) - 1)); PGK is "Phosphoglycerate Kinase (PGK)";  // SBO:0000176 vmhreaction:PGK rhea:14801 rhea:14804; isVersionOf uniprot:P00558 uniprot:P07205
  PGM: pg3 -> pg2; cyto*PGM_Vm*1/PGM_KMpg3*((pg3 - pg2/PGM_Keq)/(1 + pg3/PGM_KMpg3 + 1 + pg2/PGM_KMpg2 - 1)); PGM is "Phosphoglycerate Mutase (PGM)";  // SBO:0000176 vmhreaction:PGM rhea:15901 rhea:15904; isVersionOf uniprot:P15259 uniprot:P07738 uniprot:P18669
  ENO: pg2 -> pep + $h2o; cyto*ENO_Vm*1/ENO_KMpg2*((pg2 - pep/ENO_Keq)/(1 + pg2/ENO_KMpg2 + 1 + pep/ENO_KMpep - 1)); ENO is "Enolase (ENO)";  // SBO:0000176 vmhreaction:ENO rhea:10167 rhea:10164; isVersionOf uniprot:P06733 uniprot:P13929 uniprot:P09104
  PYK: pep + adp + $h -> pyr + atp; cyto*PYK_Vm*1/(PYK_KMpep*PYK_KMadp)*((pep*adp - pyr*atp/PYK_Keq)/((1 + pep/PYK_KMpep)*(1 + adp/PYK_KMadp) + (1 + pyr/PYK_KMpyr)*(1 + atp/PYK_KMatp) - 1)); PYK is "Pyruvate Kinase (PYK)";  // SBO:0000176 vmhreaction:PYK rhea:18160 rhea:18157; isVersionOf uniprot:P14618 uniprot:P30613
  PYRt2r: pyr => $pyr_mito; cyto*PYRt2r_Vm*(pyr/PYRt2r_KMpyr/(1 + pyr/PYRt2r_KMpyr)); PYRt2r is "Transport of Pyruvate (PYRt2r)";  // SBO:0000655 vmhreaction:PYRt2r bigg.reaction:PYRt2 metanetx.reaction:MNXR103385
  LDH_L: pyr + $nadh + $h -> lac + $nad; cyto*LDH_L_Vm*1/(LDH_L_KMpyr*LDH_L_KMnadh)*((pyr*nadh - lac*nad/LDH_L_Keq)/((1 + pyr/LDH_L_KMpyr)*(1 + nadh/LDH_L_KMnadh) + (1 + lac/LDH_L_KMlac)*(1 + nad/LDH_L_KMnad) - 1)); LDH_L is "L-Lactate Dehydrogenase (LDH_L)";  // SBO:0000176 vmhreaction:LDH_L rhea:23444 rhea:23447; isVersionOf uniprot:P00338 uniprot:P07864 uniprot:P07195 uniprot:Q9BYZ2
  L_LACt2r: lac => $lac_ext; cyto*L_LACt2r_Vm*(lac/L_LACt2r_KMlac/(1 + lac/L_LACt2r_KMlac)); L_LACt2r is "L-Lactate Transport (L_LACt2r)";  // SBO:0000655 vmhreaction:L_LACt2r metanetx.reaction:MNXR101277 seed:rxn05602
  PFK26: atp + f6p => adp + f26bp + $h; cyto*PFK26_Vm*(atp*f6p/(PFK26_KMatp*PFK26_KMf6p)/((1 + atp/PFK26_KMatp)*(1 + f6p/PFK26_KMf6p))); PFK26 is "6-Phosphofructo-2-Kinase (PFK26)";  // SBO:0000176 vmhreaction:PFK26 rhea:15656 rhea:15653; isVersionOf uniprot:Q16877 uniprot:Q16875 uniprot:P16118 uniprot:O60825
  FBP26: f26bp + $h2o => f6p + $phos; cyto*FBP26_Vm*(f26bp/FBP26_KMf26bp/(1 + f26bp/FBP26_KMf26bp)); FBP26 is "Fructose-2, 6-Bisphosphate 2-Phosphatase (FBP26)";  // SBO:0000176 vmhreaction:FBP26 metanetx.reaction:MNXR99466 bigg.reaction:FBP26; isVersionOf uniprot:Q16875 uniprot:Q9NQ88 uniprot:Q16877 uniprot:P16118
  IRS: => $ins_ext + $cpep_ext; cyto*(IRS_ss + IRS_fp); IRS is "IRS insulin secretion";  // modifiers: atp, adp; SBO:0000655 GO:0030073
  ATP_ADP_CHANGE: => atp; cyto*NUCLEOTIDE_CHANGE_Vm*(atp_adp_ss - atp_adp); ATP_ADP_CHANGE is "ATP+ADP change";  // modifiers: glc_ext; SBO:0000176

  // Events:
  // Event for presimulation under given glucose concentration for parameter fitting.
  event_presimulation: at ((presim_duration > 0 min) && (time < presim_duration)), t0=false: glc_ext = presim_glc_ext; event_presimulation is "Event for presimulation";
  // Event added to model to model simulation under given glucose concentration for parameter fitting.
  event_simulation: at (time >= presim_duration), t0=false: glc_ext = sim_glc_ext; event_simulation is "Event for simulation";

  // Unit definitions:
  unit dimless = dimensionless; dimless is "dimensionless";
  unit kg = 1000 gram;
  unit l = litre; l is "liter";
  unit m = metre; m is "meter";
  unit m2 = metre^2; m2 is "meter^2";
  unit mM = 1e-3 mole / litre; mM is "mmole/liter";
  unit mg = 1e-3 gram;
  unit min = 60 second;
  unit ml = 1e-3 litre;
  unit mmole = 1e-3 mole; mmole is "millimole";
  unit mmole_per_min = 1e-3 mole / (60 second); mmole_per_min is "mmole/min";
  unit mmole_per_min_l = 1e-3 mole / (60 second * litre); mmole_per_min_l is "mmole/min/l";
  unit nl = 1e-9 litre; nl is "nanoliter";
  unit per_l = 1 / litre; per_l is "1/liter";
  unit per_mM = litre / (1e-3 mole); per_mM is "liter/mmole";
  unit per_min = 1 / (60 second); per_min is "1/min";
  unit pmole = 1e-12 mole; pmole is "picomole";
  unit pmole_per_min = 1e-12 mole / (60 second); pmole_per_min is "pmole/min";
  unit pmole_per_min_nl = 1e-12 mole / (60 second * 1e-9 litre); pmole_per_min_nl is "pmole/min/nl";
  unit s = second; s is "second";
end
